// SBML level 2 version 3

model GPGeneratedModel()

  // Species:
  substanceOnly species Raf1Star in compartment = 0.025;
  substanceOnly species RKIP in compartment = 0.025;
  substanceOnly species Raf1Star|RKIP in compartment = 0;
  substanceOnly species ERKPP in compartment = 0;
  substanceOnly species Raf1Star|RKIP|ERKPP in compartment = 0;
  substanceOnly species ERK in compartment = 0.025;
  substanceOnly species RKIPP in compartment = 0;
  substanceOnly species MEKPP in compartment = 0.025;
  substanceOnly species MEKPP|ERK in compartment = 0;
  substanceOnly species RP in compartment = 0.03;
  substanceOnly species RP|RKIPP in compartment = 0;

  // Parameters:
  k0 = 0.06376573;
  k1 = 0.01341973;
  k2 = 0.008142786;
  k3 = 0.9942893;
  k4 = 0.08198907;
  k5 = 0.1394032;
  k6 = 0.5999223;
  k7 = 0.3601209;
  k8 = 0.9737601;
  k9 = 0.566961;
  k10 = 0.03018164;
  k11 = 0.6673613;
  k12 = 0.2255045;
  k13 = 0.1318118;
  k14 = 0.4801302;
  k15 = 0.3602399;
  k16 = 0.04081155;
  k17 = 0.5955453;
  k18 = 0.9229073;

  // Reactions:
  r0: MEKPP|ERK => MEKPP + RKIPP; k0*MEKPP|ERK;
  r1: ERKPP + Raf1Star|RKIP => Raf1Star|RKIP|ERKPP; k1*ERKPP*Raf1Star|RKIP;
  r2: MEKPP|ERK => MEKPP + ERK; k2*MEKPP|ERK;
  r3: RP|RKIPP => RP + RKIPP; k3*RP|RKIPP;
  r4: MEKPP|ERK => MEKPP + ERKPP; k4*MEKPP|ERK;
  r5: Raf1Star|RKIP => Raf1Star + RKIP; k5*Raf1Star|RKIP;
  r6: Raf1Star|RKIP|ERKPP => Raf1Star + ERK + RKIPP; k6*Raf1Star|RKIP|ERKPP;
  r7: Raf1Star|RKIP|ERKPP => Raf1Star + RKIP + ERKPP; k7*Raf1Star|RKIP|ERKPP;
  r8: Raf1Star + RKIP => Raf1Star|RKIP; k8*Raf1Star*RKIP;
  r9: RP|RKIPP => RP + ERKPP; k9*RP|RKIPP;
  r10: Raf1Star + RKIP + ERKPP => Raf1Star|RKIP|ERKPP; k10*Raf1Star*RKIP*ERKPP;
  r11: Raf1Star|RKIP|ERKPP => Raf1Star + ERKPP; k11*Raf1Star|RKIP|ERKPP;
  r12: RP|RKIPP => RP + RKIP; k12*RP|RKIPP;
  r13: Raf1Star|RKIP => Raf1Star + RKIPP; k13*Raf1Star|RKIP;
  r14: RP + RKIPP => RP|RKIPP; k14*RP*RKIPP;
  r15: Raf1Star|RKIP|ERKPP => Raf1Star + RKIPP; k15*Raf1Star|RKIP|ERKPP;
  r16: Raf1Star|RKIP|ERKPP => ERKPP + Raf1Star|RKIP; k16*Raf1Star|RKIP|ERKPP;
  r17: Raf1Star|RKIP => Raf1Star + ERKPP; k17*Raf1Star|RKIP;
  r18: MEKPP + ERK => MEKPP|ERK; k18*MEKPP*ERK;
end
